// COMSOL Multiphysics 6.4.0.378 model "ErFeO3_Heating_780nm_50um.mph"
// Outline of the model tree

Parameters
  lambda0 = 780[nm]  // Laser wavelength
  tauP = 100[fs]  // Pulse duration
  fRep = 76[MHz]  // Pulse repetition rate
  fLens = 20[mm]  // Lens focal length (metadata)
  Pavg = 1[mW]  // Incident average power (swept)
  spotDiam = 14[um]  // Laser spot diameter on sample
  w0 = spotDiam/2  // Gaussian beam radius
  tSample = 50[um]  // Sample thickness
  rSample = 250[um]  // Simulated radial extent
  T0 = 293.15[K]  // Ambient temperature
  Text = 293.15[K]  // External temperature
  hConv = 10[W/(m^2*K)]  // Convection coefficient
  etaAbs = 0.35  // Absorbed fraction of incident power
  alphaOpt = 2e6[1/m]  // Optical absorption coefficient
  kEr = 3[W/(m*K)]  // Thermal conductivity
  rhoEr = 7500[kg/m^3]  // Density
  CpEr = 400[J/(kg*K)]  // Heat capacity
  qvol = 2*etaAbs*Pavg*alphaOpt*exp(-2*r^2/w0^2)*exp(-alphaOpt*z)/(pi*w0^2)  // Absorbed volumetric heat source
  Epulse = Pavg/fRep  // Pulse energy
  Ppeak = Epulse/tauP  // Pulse peak power
  Fpeak = 2*Epulse/(pi*w0^2)  // Peak fluence for Gaussian pulse

Couplings
  maxop1: Maximum on all domains

Geometry
  geom1 "Geometry 1" (2D axisymmetric, length unit µm)
    r1: Rectangle | size = {rSample, tSample}
    fin: Finalize "Form Union" | symmetriccoord = 8

Materials
  mat1: Common "ErFeO3 (user-defined)" on all domains
    def: def "Basic"
      thermalconductivity = kEr
      density = rhoEr
      heatcapacity = CpEr

Physics
  ht: HeatTransfer "Heat Transfer in Solids" on all domains
    dependent variable T
    solid1: SolidHeatTransferModel "Solid 1" (default)
    init1: init "Initial Values 1" (default) | Tinit = T0
    axi1: AxialSymmetry (default)
    ins1: ThermalInsulation (default)
    hs1: HeatSource on all domains | Q0 = qvol
    temp1: TemperatureBoundary "Temperature 1" on boundaries 4 | T0 = T0
    hf1: HeatFluxBoundary "Heat Flux 1" on boundaries 2, 3 | q0 = hConv*(Text-T)

Mesh
  mesh1 "Mesh 1" (physics-controlled)
    size: MeshSizeDefault | hauto = 3

Studies
  std1 "Study 1"
    param: Parametric "Parametric Sweep" | pname = Pavg; plistarr = range(1[mW],1[mW],100[mW]); punit = W
    stat: Stationary

Solver configurations
  sol1 "Solution 1" (study std1)
    v1: Variables "Dependent Variables 1"
    s1: Stationary "Stationary Solver 1"
      p1: Parametric
      fc1: FullyCoupled
      d1: Direct "Direct, heat transfer variables (ht)"

Datasets
  dset1: Solution | solution = sol1